*Heading
** Job name: Job-2 Model name: Model-2
*Preprint, echo=NO, model=NO, history=NO, contact=NO
** ----------------------------------------------------------------
**
** PART INSTANCE: Part-1-1
**
*Node
      1,   7.47294188,   11.8387136
      2,   12.5438671,   19.8721256
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*Element, type=DCCAX4
 1,   1,  17, 220,  42
 2,  17,  18, 221, 220
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*Nset, nset=Part-1-1__PickedSet3
   1,   2,   3,   4,   5,   6
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*Elset, elset=Part-1-1__PickedSet3, generate
   1,  168,    1
*Nset, nset=Part-1-1__PickedSet4
   2,   3,   6,   7,  10,  11
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*Elset, elset=Part-1-1__PickedSet4, generate
 589,  798,    1
*Nset, nset=Part-1-1__PickedSet5
   7,   8,   9,  10,  11,  12
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*Elset, elset=Part-1-1__PickedSet5, generate
 169,  588,    1
*Nset, nset=Part-1-1_cement
   2,   3,   6,   7,  10,  11
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*Elset, elset=Part-1-1_cement, generate
 589,  798,    1
*Nset, nset=Part-1-1_Bone
   7,   8,   9,  10,  11,  12
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*Elset, elset=Part-1-1_Bone, generate
 169,  588,    1
** Region: (Implant:Picked)
*Elset, elset=Part-1-1__PickedSet3, generate
   1,  168,    1
** Section: Implant
*Solid Section, elset=Part-1-1__PickedSet3, material=Implant
1.,
** Region: (Bone:Picked)
*Elset, elset=Part-1-1__PickedSet5, generate
 169,  588,    1
** Section: Bone
*Solid Section, elset=Part-1-1__PickedSet5, material=Bone
1.,
** Region: (Cement:Picked)
*Elset, elset=Part-1-1__PickedSet4, generate
 589,  798,    1
** Section: Cement
*Solid Section, elset=Part-1-1__PickedSet4, material=Cement
1.,
*System
*Nset, nset=_PickedSet5
   1,   2,   3,   4,   5,   6
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*Elset, elset=_PickedSet5
   1,   2,   3,   4,   5,   6
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*Nset, nset=_PickedSet6
  15,  16, 156, 157, 158, 159, 160, 161, 162, 163, 164, 165, 166, 167, 168
*Elset, elset=_PickedSet6, generate
 449,  462,    1
*Nset, nset=_PickedSet7
  8,  9, 83, 84, 85, 86, 87, 88
*Elset, elset=_PickedSet7, generate
 176,  224,    8
*Nset, nset=_PickedSet8
   8,  13, 185, 186, 187, 188, 189, 190, 191, 192
*Elset, elset=_PickedSet8, generate
 463,  575,   14
*Nset, nset=_PickedSet9
  13,  16, 169, 170, 171, 172, 173, 174, 175, 176
*Elset, elset=_PickedSet9, generate
 337,  449,   14
*Nset, nset=_PickedSet13
   7,   8,   9,  10,  11,  12
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*Elset, elset=_PickedSet13, generate
 169,  588,    1
*Elset, elset=__PickedSurf14_S4, generate
  1,  49,   8
*Elset, elset=__PickedSurf14_S2, generate
  64,  168,    8
*Surface, type=ELEMENT, name=_PickedSurf14
__PickedSurf14_S4, S4
__PickedSurf14_S2, S2
**
** MATERIALS
**
*Material, name=Bone
*Conductivity
 0.43,
*Density
 1e-09,
*Specific Heat
 2e+09,
*Material, name=Cement
*Conductivity, dependencies=1
 0.17, ,0.
*Density
 1.1e-09,
*Depvar
      4,
*Heat Generation
*Specific Heat
 6.3e+08,
*User Defined Field
*Material, name=Implant
*Conductivity
 0.465,
*Density
 9.3e-10,
*Specific Heat
 1.84e+09,
**
** FIELDS
**
** Name: Field-1   Type: Temperature
*Initial Conditions, type=TEMPERATURE
_PickedSet13, 310.
** Name: Field-2   Type: Temperature
*Initial Conditions, type=TEMPERATURE
_PickedSet5, 296.
** ----------------------------------------------------------------
**
** STEP: Step-1
**
*Step, name=Step-1, inc=1000000, unsymm=YES
*Heat Transfer, end=PERIOD, deltmx=1.
0.01, 1000., 1e-06, 0.01,
**
** BOUNDARY CONDITIONS
**
** Name: BC-1 Type: Temperature
*Boundary
_PickedSet6, 11, 11, 310.
** Name: BC-2 Type: Temperature
*Boundary
_PickedSet7, 11, 11, 310.
** Name: BC-3 Type: Temperature
*Boundary
_PickedSet8, 11, 11, 310.
** Name: BC-4 Type: Temperature
*Boundary
_PickedSet9, 11, 11, 310.
**
** CONTROLS
**
*Controls, reset
*Controls, parameters=field, field=temperature
0.005, 0.01, , 5e-08, 0.02, 1e-05, 0.001, 1e-08
, 1e-05
**
** OUTPUT REQUESTS
**
*Restart, write, frequency=0
**
** FIELD OUTPUT: F-Output-1
**
*Output, field, frequency=50
*Node Output
NT, RFL
*Element Output, directions=YES
HFL, SDV, TEMP
**
** HISTORY OUTPUT: H-Output-1
**
*Output, history, variable=PRESELECT
*End Step
