*Heading
** Job name: Job-dflux-1 Model name: Model_DFLUX
*Preprint, echo=NO, model=NO, history=NO, contact=NO
**
** PARTS
**
*Part, name=Part-1
*Node
      1,           9.,           1.
      2,           9.,           0.
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*Element, type=DCAX4
 1,  1,  2,  9, 86
 2, 86,  9, 10, 85
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*Nset, nset=_PickedSet13, internal
   5,   6,   7,   8, 109, 110
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*Elset, elset=_PickedSet13, internal, generate
 53,  76,   1
*Nset, nset=_PickedSet14, internal
   5,   6,   7,   8, 109, 110
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*Elset, elset=_PickedSet14, internal, generate
 53,  76,   1
*Nset, nset=_PickedSet15, internal
   1,   2,   5,   6,  87,  88
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*Elset, elset=_PickedSet15, internal, generate
 41,  52,   1
*Nset, nset=_PickedSet16, internal
  1,  2,  3,  4,  9, 10
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*Elset, elset=_PickedSet16, internal, generate
  1,  40,   1
** Region: (Bone:Picked)
*Elset, elset=_PickedSet16, internal, generate
  1,  40,   1
** Section: Bone
*Solid Section, elset=_PickedSet16, material=Bone
1.,
** Region: (Cement:Picked)
*Elset, elset=_PickedSet15, internal, generate
 41,  52,   1
** Section: Cement
*Solid Section, elset=_PickedSet15, material=Cement
1.,
** Region: (Implant:Picked)
*Elset, elset=_PickedSet14, internal, generate
 53,  76,   1
** Section: Implant
*Solid Section, elset=_PickedSet14, material=Implant
1.,
*End Part
**
**
** ASSEMBLY
**
*Assembly, name=Assembly
**
*Instance, name=Part-1-1, part=Part-1
*End Instance
**
*Nset, nset=_PickedSet5, internal, instance=Part-1-1
 3, 4
*Elset, elset=_PickedSet5, internal, instance=Part-1-1
 40,
*Nset, nset=cement, instance=Part-1-1
   1,   2,   5,   6,  87,  88
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*Elset, elset=cement, instance=Part-1-1, generate
 41,  52,   1
*Nset, nset=Implant, instance=Part-1-1
   5,   6,   7,   8, 109, 110
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*Elset, elset=Implant, instance=Part-1-1, generate
 53,  76,   1
*Nset, nset=Bone, instance=Part-1-1
  1,  2,  3,  4,  9, 10
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*Elset, elset=Bone, instance=Part-1-1, generate
  1,  40,   1
*Nset, nset=_PickedSet10, internal, instance=Part-1-1
   1,   2,   5,   6,  87,  88
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*Elset, elset=_PickedSet10, internal, instance=Part-1-1, generate
 41,  52,   1
*Nset, nset=_PickedSet11, internal, instance=Part-1-1
  1,  2,  3,  4,  9, 10
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*Elset, elset=_PickedSet11, internal, instance=Part-1-1, generate
  1,  40,   1
*Nset, nset=_PickedSet12, internal, instance=Part-1-1
   1,   2,   5,   6,   7,   8
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*Elset, elset=_PickedSet12, internal, instance=Part-1-1, generate
 41,  76,   1
*End Assembly
**
** MATERIALS
**
*Material, name=Bone
*Conductivity
 0.43,
*Density
 1e-09,
*Specific Heat
 2e+09,
*Material, name=Cement
*Conductivity
 0.17,
*Density
 1.1e-09,
*Specific Heat
 6.3e+08,
*User Output Variables
      4,
*Material, name=Implant
*Conductivity
20.,
*Density
 6e-09,
*Specific Heat
 4e+08,
**
** FIELDS
**
** Name: Field-1   Type: Temperature
*Initial Conditions, type=TEMPERATURE
_PickedSet11, 310.
** Name: Field-2   Type: Temperature
*Initial Conditions, type=TEMPERATURE
_PickedSet12, 296.
** ----------------------------------------------------------------
**
** STEP: Step-1
**
*Step, name=Step-1, extrapolation=NO, inc=200000, unsymm=YES
*Heat Transfer, end=PERIOD, deltmx=0.01
0.5, 1000., 1e-06, 0.5,
**
** BOUNDARY CONDITIONS
**
** Name: BC-1 Type: Temperature
*Boundary
_PickedSet5, 11, 11, 310.
**
** LOADS
**
** Name: Load-1   Type: Body heat flux
*Dflux
_PickedSet10, BFNU, 1.
**
** OUTPUT REQUESTS
**
*Restart, write, frequency=0
**
** FIELD OUTPUT: F-Output-1
**
*Output, field
*Node Output
NT,
*Element Output, directions=YES
HFL, NFLUX, TEMP, UVARM
*Contact Output
HFLA,
**
** HISTORY OUTPUT: H-Output-1
**
*Output, history, variable=PRESELECT
*End Step
